// SBML level 2 version 1

model feedback_network()

  // Compartments:
  compartment default = 1;

  // Species:
  species buffX in default = 0;
  species buffY in default = 0;
  species GeneX in default = 0;
  species GeneY in default = 0;
  species Y2GeneX in default = 0;
  species X2GeneY in default = 0;
  species X in default = 0;
  species Y in default = 0;

  // Parameters:
  ksx = 100;
  kdx = 2;
  ksy = 400;
  kdy = 1;
  r5 = 0.001;
  r6 = 0.001;
  ku7 = 0.1;
  ku8 = 1;
  r9 = 300;

  // Reactions:
  re1: buffX => X; default*ksx*GeneX;  // modifiers: GeneX
  re2: X => buffX; default*kdx*X;
  re3: buffY => Y; default*ksy*GeneY;  // modifiers: GeneY
  re4: Y => buffY; default*kdy*Y;
  re5: 2 Y + GeneX => Y2GeneX; default*r5*GeneX*(Y*(Y - 1)/2);
  re6: 2 X + GeneY => X2GeneY; default*r6*GeneY*(X*(X - 1)/2);
  re7: Y2GeneX => 2 Y + GeneX; default*ku7*Y2GeneX;
  re8: X2GeneY => 2 X + GeneY; default*ku8*X2GeneY;
  re9: buffX => X; default*r9*Y2GeneX;  // modifiers: Y2GeneX
end
