// SBML level 2 version 1

model ffl3_A_B_C()

  // Compartments:
  compartment default = 1;

  // Species:
  species buffA in default = 0;
  species GeneA in default = 1/default;
  species A in default = 0;
  species buffB in default = 0;
  species GeneB in default = 1/default;
  species B in default = 0;
  species bGeneB in default = 0;
  species buffC in default = 0;
  species GeneC in default = 1/default;
  species C in default = 0;
  species bGeneC_A in default = 0;
  species bGeneC_B in default = 0;

  // Parameters:
  sA = 10;
  sB = 10;
  sC = 10;
  dA = 1;
  dB = 1;
  dC = 1;
  k1 = 3;
  k2 = 0.5;
  k3 = 5;
  rAb = 0.005;
  fAb = 0.1;
  rAc = 0.005;
  fAc = 0.1;
  rBc = 0.005;
  fBc = 0.1;

  // Reactions:
  syn_A: buffA => A; default*sA*GeneA;  // modifiers: GeneA
  deg_A: A => buffA; default*dA*A;
  syn_B_basal: buffB => B; default*sB*GeneB;  // modifiers: GeneB
  syn_B_from_bGeneB: buffB => B; default*k1*sB*bGeneB;  // modifiers: bGeneB
  deg_B: B => buffB; default*dB*B;
  syn_C_basal: buffC => C; default*sC*GeneC;  // modifiers: GeneC
  syn_C_from_bGeneC_A: buffC => C; default*k2*sC*bGeneC_A;  // modifiers: bGeneC_A
  syn_C_from_bGeneC_B: buffC => C; default*k3*sC*bGeneC_B;  // modifiers: bGeneC_B
  deg_C: C => buffC; default*dC*C;
  bind_A_GeneB: A + GeneB => bGeneB; default*rAb*A*GeneB;
  unbind_A_GeneB: bGeneB => A + GeneB; default*fAb*bGeneB;
  bind_A_GeneC: A + GeneC => bGeneC_A; default*rAc*A*GeneC;
  unbind_A_GeneC: bGeneC_A => A + GeneC; default*fAc*bGeneC_A;
  bind_B_GeneC: B + GeneC => bGeneC_B; default*rBc*B*GeneC;
  unbind_B_GeneC: bGeneC_B => B + GeneC; default*fBc*bGeneC_B;
end
