// SBML level 2 version 1

model clotting()

  // Compartments:
  compartment default = 1;

  // Species:
  species buffer1 in default = 250/default;
  species buffer2 in default = 250/default;
  species GeneX in default = 1/default;
  species X in default = 0;
  species GeneY in default = 1/default;
  species Y in default = 0;
  species BGeneX in default = 0;
  species BGeneY in default = 0;

  // Parameters:
  k1 = 50;
  k2 = 20;
  k3 = 1;
  k4 = 1;
  k5 = 1e-5;
  k6 = 3.5e-5;
  k7 = 0.1;
  k8 = 0.1;

  // Reactions:
  ONE: GeneX + buffer1 => GeneX + X; default*k1*GeneX;
  TWO: GeneY + buffer2 => GeneY + Y; default*k2*GeneY;
  THREE: X => buffer1; default*k3*X;
  FOUR: Y => buffer2; default*k4*Y;
  FIVE: X + X + GeneY => BGeneY; default*k5*X*GeneY*(X - 1);
  SIX: Y + Y + GeneX => BGeneX; default*k6*Y*GeneX*(Y - 1);
  SEVEN: BGeneY => X + X + GeneY; default*k7*BGeneY;
  EIGHT: BGeneX => Y + Y + GeneX; default*k8*BGeneX;
end
