// SBML level 2 version 1

model Toggle_switch()

  // Compartments:
  compartment default = 1;

  // Species:
  species Pa in default = 0;
  species Pb in default = 0;
  species Da in default = 0;
  species Db in default = 0;
  species BDa in default = 0;
  species BDb in default = 0;
  species ES in default = 0;

  // Parameters:
  s_a = 1;
  s_b = 1;
  d_a = 1;
  d_b = 1;
  b_a = 1;
  b_b = 1;
  u_a = 1;
  u_b = 1;
  d = 1;
  s_0 = 0;
  omega = 0.1;
  Xeq = 20000;
  Xad = 50;

  // Assignment rules:
  s := 2*d*Xad - s_0;
  u := omega*d;
  b := u/Xeq;

  // Reactions:
  re1: ES => Pb; default*s*Db;  // modifiers: Db
  re2: ES => Pa; default*s*Da;  // modifiers: Da
  re5: 2 Pb + Da => BDa; default*b*(Pb*(Pb - 1)/2)*Da;
  re7: BDa => Da + 2 Pb; default*u*BDa;
  re11: Pb => ES; default*d*Pb;
  re12: Pa => ES; default*d*Pa;
  re13: 2 Pa + Db => BDb; default*b*(Pa*(Pa - 1)/2)*Db;
  re14: BDb => 2 Pa + Db; default*u*BDb;
end
